<?xml version="1.0" encoding="UTF-8"?>
<?xml-stylesheet type="text/xsl" href="http://jsbsim.sourceforge.net/JSBSim.xsl"?>
<fdm_config name="Boeing-707" version="2.0" release="ALPHA"
    xmlns:xsi="http://www.w3.org/2001/XMLSchema-instance"
    xsi:noNamespaceSchemaLocation="http://jsbsim.sourceforge.net/JSBSim.xsd">

<fileheader>
    <author>Megaf - [mmegaf@gmail.com] [https://flightgear-republic.org]</author>
    <filecreationdate>07/03/2021</filecreationdate>
    <version>202103071800</version>
    <description>Boeing 707 for FlightGear</description>
</fileheader>

<metrics>
    <wingarea unit="FT2">3050</wingarea>
    <wingspan unit="FT">145.9</wingspan>
</metrics>

<mass_balance>
    <emptywt unit="LBS">148300</emptywt>
</mass_balance>

<!-- contact types "inspired" by FGAddons 707 -->
<ground_reactions>
    <contact type="BOGEY" name="NOSE">
        <location unit="IN">
            <x>-618.44</x>
            <y>0.00</y>
            <z>-114.00</z>
        </location>

        <static_friction>0.55</static_friction>
        <dynamic_friction>0.50</dynamic_friction>
        <rolling_friction>0.02</rolling_friction>
        <spring_coeff unit="LBS/FT">90000</spring_coeff>
        <damping_coeff unit="LBS/FT/SEC">6000</damping_coeff>
        <damping_coeff_rebound unit="LBS/FT/SEC">12000</damping_coeff_rebound>

        <relaxation_velocity>
            <rolling unit="FT/SEC">0.6</rolling>
            <side unit="FT/SEC">0.6</side>
        </relaxation_velocity>

        <force_lag_filter>
            <rolling>120.0</rolling>
            <side>120.0</side>
        </force_lag_filter>

        <wheel_slip_filter>120.0</wheel_slip_filter>
        <max_steer unit="DEG">35</max_steer>
        <brake_group> NONE </brake_group>
        <retractable>1</retractable>
    </contact>

    <contact type="BOGEY" name="LEFT_MAIN">
        <location unit="IN">
            <x>71.65</x>
            <y>-98.81</y>
            <z>-116.3</z>
        </location>

        <static_friction>0.55</static_friction>
        <dynamic_friction>0.70</dynamic_friction>
        <rolling_friction>0.04</rolling_friction>
        <spring_coeff unit="LBS/FT">230000.00</spring_coeff>
        <damping_coeff unit="LBS/FT/SEC">140000.00</damping_coeff>
        <max_steer unit="DEG">0</max_steer>
        <brake_group>LEFT</brake_group>
        <retractable>1</retractable>
    </contact>

    <contact type="BOGEY" name="RIGHT_MAIN">
        <location unit="IN">
            <x>71.65</x>
            <y>98.81</y>
            <z>-116.3</z>
        </location>

        <static_friction>0.55</static_friction>
        <dynamic_friction>0.70</dynamic_friction>
        <rolling_friction>0.04</rolling_friction>
        <spring_coeff unit="LBS/FT">230000.00</spring_coeff>
        <damping_coeff unit="LBS/FT/SEC">140000.00</damping_coeff>
        <max_steer unit="DEG">0</max_steer>
        <brake_group>RIGHT</brake_group>
        <retractable>1</retractable>
    </contact>
</ground_reactions>

<turbine_engine name="JT3D-1">
    <milthrust>      17.0  </milthrust>
    <bypassratio>     1.0  </bypassratio>
    <tsfc>            0.8  </tsfc>
    <bleed>           0.03 </bleed>
    <idlen1>         30.0  </idlen1>
    <idlen2>         60.0  </idlen2>
    <maxn1>         100.0  </maxn1>
    <maxn2>         100.0  </maxn2>
    <augmented>         0  </augmented>
    <injected>          1  </injected>

<function name="IdleThrust">
    <table>
    <independentVar lookup="row">velocities/mach</independentVar>
    <independentVar lookup="column">atmosphere/density-altitude</independentVar>
    <tableData>
        -10000     0     10000   20000   30000   40000   50000   60000
    0.0  0.0430  0.0488  0.0528  0.0694  0.0899  0.1183  0.1467  0
    0.2  0.0500  0.0501  0.0335  0.0544  0.0797  0.1049  0.1342  0
    0.4  0.0040  0.0047  0.0020  0.0272  0.0595  0.0891  0.1203  0
    0.6  0.0     0.0     0.0     0.0     0.0276  0.0718  0.1073  0
    0.8  0.0     0.0     0.0     0.0     0.0474  0.0868  0.0900  0
    1.0  0.0     0.0     0.0     0.0     0.0     0.0552  0.0800  0
    </tableData>
    </table>
</function>

<function name="MilThrust">
    <table>
    <independentVar lookup="row">velocities/mach</independentVar>
    <independentVar lookup="column">atmosphere/density-altitude</independentVar>
    <tableData>
         -10000       0   10000   20000   30000   40000   50000   60000
    0.0   1.2600  1.0000  0.7400  0.5340  0.3720  0.2410  0.1490  0
    0.2   1.1710  0.9340  0.6970  0.5060  0.3550  0.2310  0.1430  0
    0.4   1.1500  0.9210  0.6920  0.5060  0.3570  0.2330  0.1450  0
    0.6   1.1810  0.9510  0.7210  0.5320  0.3780  0.2480  0.1540  0
    0.8   1.2580  1.0200  0.7820  0.5820  0.4170  0.2750  0.1700  0
    1.0   1.3690  1.1200  0.8710  0.6510  0.4750  0.3150  0.1950  0
    1.2   1.4850  1.2300  0.9750  0.7440  0.5450  0.3640  0.2250  0
    1.4   1.5941  1.3400  1.0860  0.8450  0.6280  0.4240  0.2630  0
    </tableData>
    </table>
</function>

<function name="Injection">
    <table>
    <independentVar lookup="row">velocities/mach</independentVar>
    <independentVar lookup="column">atmosphere/density-altitude</independentVar>
    <tableData>
           0       50000
    0.0    1.2000  1.2000
    1.0    1.2000  1.2000
    </tableData>
    </table>
</function>
</turbine_engine>
</fdm_config>
